log             none

variable        vT              equal   2000
variable        vP              equal   0.0
variable        vTimestep       equal   0.002
variable        vTdamp          equal   0.2
variable        vRunStep        equal   200000
variable        vThermoStep     equal   10000
variable        vDumpStep       equal   10000
variable        vInRestartPath  string  lmp/.temp/restart/melt-Cu108-init
variable        vDumpPath       string  lmp/.temp/dump/Cu108.lammpstrj


units           metal
boundary        p p p

read_restart    ${vInRestartPath}
timestep        ${vTimestep}

pair_style      lj/cut  3.6
pair_coeff      1 1 0.167 2.314 3.6

thermo          ${vThermoStep}
thermo_style    custom step temp press vol pe ke etotal enthalpy
thermo_modify   flush yes

dump            1 all custom ${vDumpStep} ${vDumpPath} id type x y z vx vy vz

fix             1 all npt temp ${vT} ${vT} ${vTdamp} iso ${vP} ${vP} 2
run             ${vRunStep}
